# Дано | Матриця | Вектор
A := [4.4, 7.1, -2.0; 4.1, 5.5, 12.5; 9.1, 4.4, 1.9]
b := [3.2; -1.9; -5.3]
Знайти
вектор
x(x1, x2, x3)
# Розв'язання | Перевірка
1*спосіб
x := lsolve(A, b)
x = [-1.01381; 1.00524; -0.261776]
A*x = [3.2; -1.9; -5.3]
2*спосіб
x := A^-1*b
x = [-1.01381; 1.00524; -0.261776]
3*спосіб
Ab := augment(A, b)
Ab = [4.4, 7.1, -2, 3.2; 4.1, 5.5, 12.5, -1.9; 9.1, 4.4, 1.9, -5.3]
Ag := rref(Ab)
Ag = [1, 0, 0, -1.01381; 0, 1, 0, 1.00524; 0, 0, 1, -0.261776]
4*спосіб
solve block
    # guess values
    x1 := 1
    x2 := 1
    x3 := 1
    # constraints
    4.4*x1 + 7.1*x2 - 2*x3 == 3.2
    4.1*x1 + 5.5*x2 + 12.5*x3 == -1.9
    9.1*x1 + 4.4*x2 + 1.9*x3 == -5.3
    # solver
    find(x1, x2, x3) = [-1.01381; 1.00524; -0.261776]
end solve block
Визначник
det([4.4, 7.1, -2; 4.1, 5.5, 12.5; 9.1, 4.4, 1.9]) = 620.316
Квадрат
A^2 = [30.27, 61.49, 76.15; 154.34, 114.36, 84.3; 75.37, 97.17, 40.41]
Обернена
A^-1 = [
    -0.0718182, -0.0359333, 0.160805;
    0.170816, 0.0428169, -0.101884;
    -0.0516027, 0.0729467, -0.00791532
]
Транспонована
transpose(A) = [4.4, 4.1, 9.1; 7.1, 5.5, 4.4; -2, 12.5, 1.9]
# Скалярний добуток першого і другого стовпців
A[:, 0]*A[:, 1] = 93.83
# Векторний добуток другого і третього стовпців
A[:, 1]×A[:, 2] = [-44.55; -22.29; 99.75]
# Сума елементів другого стовпця
sum(A[:, 1]) = 17
# Ранг
rank(A) = 3
# Слід
tr(A) = 11.8
# Власні значення
c := eigenvals(A)
c = [15.7533; -1.97664 + 5.95566i; -1.97664 - 5.95566i]
# Власні вектори
eigenvecs(A) = [
    -0.39297, -0.491146 - 0.327649i, -0.491146 + 0.327649i;
    -0.769983, 0.651549, 0.651549;
    -0.502694, -0.228615 + 0.417901i, -0.228615 - 0.417901i
]
# Збільшити значення елементів вдвічі, переставити стовпці матриці так, щоб 1-й рядок був відсортованим по зростанню
A*2 = [8.8, 14.2, -4; 8.2, 11, 25; 18.2, 8.8, 3.8]
rsort(A*2, 0) = [-4, 8.8, 14.2; 25, 8.2, 11; 3.8, 18.2, 8.8]
# Збільшити значення елементів на 1, переставити рядки утвореної матриці так, щоб 2-й стовпець був відсортований по зростанню
A + 1 = [5.4, 8.1, -1; 5.1, 6.5, 13.5; 10.1, 5.4, 2.9]
csort(A + 1, 1) = [10.1, 5.4, 2.9; 5.1, 6.5, 13.5; 5.4, 8.1, -1]
# Утворити нову матрицю з матриці А, відкинувши останній рядок і стовпець
f(i, j) := A[i, j]
D := matrix(2, 2, f)
D = [4.4, 7.1; 4.1, 5.5]
3.
f(i, j) := (5*i + 6*j - 2)^2
M := matrix(3, 3, f)
M = [4, 16, 100; 9, 81, 225; 64, 196, 400]
4.
A + M = [8.4, 23.1, 98; 13.1, 86.5, 237.5; 73.1, 200.4, 401.9]
A - M = [0.4, -8.9, -102; -4.9, -75.5, -212.5; -54.9, -191.6, -398.1]
A*M = [-46.5, 253.5, 1237.5; 865.9, 2961.1, 6647.5; 197.6, 874.4, 2660]
augment(M, A) = [4, 16, 100, 4.4, 7.1, -2; 9, 81, 225, 4.1, 5.5, 12.5; 64, 196, 400, 9.1, 4.4, 1.9]
stack(M, A) = [4, 16, 100; 9, 81, 225; 64, 196, 400; 4.4, 7.1, -2; 4.1, 5.5, 12.5; 9.1, 4.4, 1.9]
5.
# Знайти добуток додатних елементів
A = [4.4, 7.1, -2; 4.1, 5.5, 12.5; 9.1, 4.4, 1.9]
Prog(A) :=
    d ← 1
    for a ∈ A
        if a > 0
            d ← d*a
Prog(A) = 669908
