F(t) := t^4 + 8*t^3 - 6*t^2 - 72*t + 90
F1(t) := d/dt(F(t))
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Given
d/dt(F1(t)) == 0
Find(t) → [sqrt(5) - 2, -sqrt(5) - 2]
t := sqrt(5) - 2 - sqrt(5) - 2
sign(d^2/dt^2(F(t))) = -1
F(t) = 26  # min
