# 1. | 1*спосіб
x := 1.8
f(x) := ln(x) + (x + 1)^3
g(x) := 0
a := root(f(x) - g(x), x)
a = 0.187439
2*спосіб
solve block
    # guess values
    x := 1.8
    # constraints
    ln(x) + (x + 1)^3 == 0
    # solver
    find(x) = 0.187439
end solve block
3*спосіб
x := x
ln(x) + (x + 1)^3 == 0 solve → 0.187438928731
2.
25*x^4 + 12*x^3 - 18*x^2 + 2*x - 3 == 0
v := [-3; 2; -18; 12; 25]
r := polyroots(v)
r = [-1.20283; 0.00631949 - 0.374746i; 0.00631949 + 0.374746i; 0.710196]
3.
solve block
    # guess values
    x := 1
    y := 1
    # constraints
    sqrt(x) + sqrt(y) == 9
    nthroot(x, 3) + nthroot(y, 3) == 5
    # solver
    find(x, y) = [64; 1]
end solve block
4.
limit((x^2 - x - 6)/(x^2 + x - 12), x → 3) → 5/7
5.
clear(x)
d/dx((3^sin(2*x) - cos(2*x)^2)^3) → 3*(4*cos(2*x)*sin(2*x) + 2*3^sin(2*x)*cos(2*x)*ln(3))*(cos(2*x)^2 - 3^sin(2*x))^2
d/dx(3*(4*cos(2*x)*sin(2*x) + 2*3^sin(2*x)*cos(2*x)*ln(3))*(cos(2*x)^2 - 3^sin(2*x))^2) → (cos(2*x)^2 - 3^sin(2*x))^2*(24*cos(2*x)^2 - 24*sin(2*x)^2 + 12*3^sin(2*x)*cos(2*x)^2*ln(3)^2 - 12*3^sin(2*x)*sin(2*x)*ln(3)) - 2*(4*cos(2*x)*sin(2*x) + 2*3^sin(2*x)*cos(2*x)*ln(3))*(12*cos(2*x)*sin(2*x) + 6*3^sin(2*x)*cos(2*x)*ln(3))*(cos(2*x)^2 - 3^sin(2*x))
6*.
integral(x^3 + (1/(x^2 + 1)), x = 0 .. 1) = 1.0354
7.
clear(x)
integral((x + nthroot(x, 3))^2/sqrt(x), x) → 2*x^(5/2)/5 + integral(nthroot(x, 3)^2/sqrt(x) + 2*sqrt(x)*nthroot(x, 3), x)
8.
sum(1/(n*(n + 2)*(n + 1)), n = 1 .. ∞) → 1/4
9.
sin(x)^2 series → x^2 - x^4/3 + 2*x^6/45
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10.
x := 0, 0.4 .. 2 = [0; 0.4; 0.8; 1.2; 1.6; 2]
z := vectorize((x^3 + 2*x)/(3*cos*sqrt(x) + 1)) = [0; 2.31094; 18.4416; -48.8622; -28.9234; -29.9954]
# [plot: z vs x]
