1.
f(x) := x/(2 + x)
a := 0
b := 2.5
i := 0 .. 5
h := (a + b)/5
i = [0; 1; 2; 3; 4; 5]
Vx[i] := a + h*i
Vy[i] := f(Vx[i])
Vx = [0; 0.5; 1; 1.5; 2; 2.5]
Vy = [0; 0.2; 0.333333; 0.428571; 0.5; 0.555556]
# Кусково-лінійна інтерполяція
f_1(x) := linterp(Vx, Vy, x)
f_1(1.276) = 0.385905
# [plot: f_1(x) vs x]
# інтерполяція кубічними сплайнами
Vs := cspline(Vx, Vy)
f_2(x) := interp(Vs, Vx, Vy, x)
f_2(1.276) = 0.389452
# [plot: f_2(x) vs x]
2.
a := 0
b := 2.5
f(x) := x/(2 + x)
i := 0 .. (b - a)*10
x[i] := a + i/10
y[i] := f(x[i])
p := predict(y, 7, 20)
t := 0 .. 20 - 1
xp[t] := (t + b*10)/10
# [plot: y, p[t], f(xp[t]) vs x, xp[t]]
3.
i := 0 .. 4
X := [0, 0; 1, 10; 2, 20; 3, 30; 4, 40]
j := 0 .. 4
Y[i, j] := cos(i + 10/(j + 1))
S1 := cspline(X, Y)
k := 30
i := 0 .. k
j := 0 .. k
V1 := [3.7; 2.2]
A1[i, j] := interp(S1, X, Y, [i*4/k; j*40/k])
interp(S1, X, Y, V1) = -0.312516
# [3D plot: A1]
# [contour plot: A1]
4.
f(x) := x/(2 + x)
a := 0
b := 2.5
i := 0 .. 5
h := (a + b)/5 = 0.5
n := (b - a)/h = 5
x := 0, 0.5 .. 2.5 = [0; 0.5; 1; 1.5; 2; 2.5]
f(x) = [0; 0.2; 0.333333; 0.428571; 0.5; 0.555556]
L(z) := sum(f(x[k])*product(if(k == j, 1, (z - x[j])/(x[k] - x[j])), j = 0 .. 3), k = 0 .. 3)
L(0.5) = 0.2
# [plot: L(x) vs x]
5.
Vx := [6; 9; 12; 15; 17; 37; 41; 43]
Vy := [24; 43; 66; 69; 78; 177; 199; 208]
a := intercept(Vx, Vy) = -1.39655
b := slope(Vx, Vy) = 4.86207
f_regn(x) := a + b*x
f_regn(3.7250) = 16.7147
# коефіцієнт кореляції
corr(Vx, Vy) = 0.998478
# [plot: f_regn(x), Vy vs x, Vx]
# 6. | Поліноміальна регресія
Vx := [1.1; 1.22; 1.34; 1.44; 1.58; 1.69]
Vy := [13.34; 15.23; 17.41; 19.45; 22.69; 25.59]
k := regress(Vx, Vy, 2) = [3; 3; 2; 11.0672; -10.0563; 11.0299]
Vg := [1; 1; 1]
f(x) := interp(k, Vx, Vy, x)
f(3.765) = 129.557
# [plot: Vy, f(i) vs Vx, i]
# Експоненціальна регресія
Vx = [1.1; 1.22; 1.34; 1.44; 1.58; 1.69]
Vy = [13.34; 15.23; 17.41; 19.45; 22.69; 25.59]
C1 := expfit(Vx, Vy, Vg) = [4.28912; 1.07047; -0.590983]
f(x) := C1[0]*e^(C1[1]*x) + C1[2]
# [plot: Vy, f(x) vs Vx, x]
