# 1. | Розв’язати задачу Коші з Odesolve():
solve block
    # constraints
    d/dx(y(x)) == 1 - sin(x - y(x)) + 1.5*(x - y(x))
    y(0) == 0
    # solver
    y := odesolve(y(x), 0.6)
    # [plot: y(x) vs x]
end solve block
# 2. | Розв’язати задачу Коші з rkfixed() :
ORIGIN ≡ 1
y := 0
D(x, y) := 1 - sin(x - y) + 1.5*(x - y)
Y_10 := rkfixed(y, 1, 2, 10, D)
# [plot: Y_10[:, 2] vs Y_10[:, 1]]
Y_10 = [
    1, 0;
    1.1, 0.162846;
    1.2, 0.320233;
    1.3, 0.472873;
    1.4, 0.62135;
    1.5, 0.766151;
    1.6, 0.907682;
    1.7, 1.04629;
    1.8, 1.18226;
    1.9, 1.31585;
    2, 1.44727
]
Y_20 := rkfixed(y, 1, 2, 20, D)
# [plot: Y_20[:, 2] vs Y_20[:, 1]]
Y_20 = [
    1, 0;
    1.05, 0.0821562;
    1.1, 0.162846;
    1.15, 0.242174;
    1.2, 0.320233;
    1.25, 0.397107;
    1.3, 0.472873;
    1.35, 0.547599;
    1.4, 0.62135;
    1.45, 0.694183;
    1.5, 0.766151;
    1.55, 0.837303;
    1.6, 0.907682;
    1.65, 0.977331;
    1.7, 1.04629;
    1.75, 1.11459;
    1.8, 1.18226;
    1.85, 1.24934;
    1.9, 1.31585;
    1.95, 1.38182;
    2, 1.44727
]
i := 1 .. 10
Er[i] := [|Y_10[:, 2][i] - Y_20[:, 2][2*i - 1]|]
Error := (max(Er)/15)  # error: Элементы массива должны быть скалярами. Они не могут быть векторами или матрицами.
Error =  # error: Эта переменная не определена. Проверьте правильность установки обозначения.
solve block
    # constraints
    y''(x) == -sin(x)*y'(x) + y(x) + x/(2*π)
    y(0) == 0
    y'(0) == 1
    # solver
    y := Odesolve(y(x), 4*π)
    # [plot: y(x) vs x]
end solve block
3.
4.
y := [1; -1; 1]
D(x, y) := [4*y[1] + y[2] + 5*y[3]; 2*y[1] - y[2] - 5*y[3]; -7*y[1] - y[2] - 8*y[3]]
Y := rkfixed(y, 2, 3, 30, D)
Y = [
    2, 1, -1, 1;
    2.03333, 1.24574, -1.02049, 0.563934;
    2.06667, 1.45447, -0.958636, 0.182991;
    2.1, 1.6327, -0.827689, -0.151065;
    2.13333, 1.78606, -0.638802, -0.445424;
    2.16667, 1.91943, -0.401319, -0.706367;
    2.2, 2.037, -0.123018, -0.939379;
    2.23333, 2.14243, 0.189676, -1.14926;
    2.26667, 2.23885, 0.531507, -1.34019;
    2.3, 2.329, 0.898226, -1.51586
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]
# [plot: Y[:, 2], Y[:, 3], Y[:, 4] vs Y[:, 1]]
6.
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y'[1] := -y[2]
y'[2] := -2*y[1] + 3*y[2]
y1[:, 3] := 1
y2[:, 3] := 2
[3*;4]
D(x, y) := [-y[2]; -2*y[1] + 3*y[2]]
y := [1; 2]
J(x, y) := [0, 0, -1; 0, -2, 3]
Y := Stiffr(y, 3, 4, 20, D, J)
# [plot: Y[:, 2], Y[:, 3] vs Y[:, 1]]
Y = [
    3, 1, 2;
    3.05, 0.894651, 2.22122;
    3.1, 0.777082, 2.49023;
    3.15, 0.64468, 2.81621;
    3.2, 0.494329, 3.21015;
    3.25, 0.322315, 3.68516;
    3.3, 0.124201, 4.25694;
    3.35, -0.105303, 4.94422;
    3.4, -0.372517, 5.76941;
    3.45, -0.684986, 6.75928;
    3.5, -1.05172, 7.94583;
    3.55, -1.48348, 9.36728;
    3.6, -1.99312, 11.0693;
    3.65, -2.59599, 13.1065;
    3.7, -3.31044, 15.5442;
    3.75, -4.15838, 18.4602;
    3.8, -5.16598, 21.9478;
    3.85, -6.36453, 26.1183;
    3.9, -7.79139, 31.1046;
    3.95, -9.49122, 37.0657;
    4, -11.5174, 44.1916
]
