5.
Vx := [6; 9; 12; 15; 17; 37; 41; 43]
Vy := [24; 43; 66; 69; 78; 177; 199; 208]
a := intercept(Vx, Vy) = -1.39655
b := slope(Vx, Vy) = 4.86207
f_regn(x) := a + b*x
f_regn(3.7250) = 16.7147
# коефіцієнт кореляції
corr(Vx, Vy) = 0.998478
# [plot: f_regn(x), Vy vs x, Vx]
