5.
ORIGIN ≡ 1
x0 := 0
b := 4*π
y := [0; 1]
y1 == y
y2 == y'
D(x, y) := [y[2]; -sin(x)*y[2] + y[1] + x/(2*π)]
y'' == y2'
Y_20 := rkfixed(y, 0, 4*π, 20, D)
y1' == y2
y2' == -sin(x)*y2 + y1 + x/(2*π)
# [plot: Y_20[:, 1] vs Y_20[:, 2]]
Y_20 = [
    0, 0, 1;
    0.628319, 0.635223, 1.03591;
    1.25664, 1.32497, 1.18982;
    1.88496, 2.1796, 1.59502;
    2.51327, 3.43928, 2.56539;
    3.14159, 5.69487, 5.02754;
    3.76991, 10.639, 11.9909;
    4.39823, 23.5506, 33.1011;
    5.02655, 60.2151, 93.8218;
    5.65487, 157.864, 232.871;
    6.28319, 369.563, 448.863;
    6.9115, 722.936, 670.265;
    7.53982, 1208.9, 879.897;
    8.16814, 1850.74, 1200.52;
    8.79646, 2792.05, 1901.92;
    9.42478, 4449.51, 3670.76;
    10.0531, 8038.68, 8674.17;
    10.6814, 17351.7, 23837.4;
    11.3097, 43722.1, 67434.4;
    11.9381, 113870, 167238;
    12.5664, 265867, 322226
]
