# 1. Засобами MATHCAD побудувати графік заданої функції на відрізку. Знайти мінімум/максимум функції на даному відрізку.
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F(x) := x^4 + 8*x^3 - 6*x^2 - 72*x + 90
# [plot: F(x) vs x]
solve block
    # guess values
    x := 1
    # constraints
    1 ≤ x ≤ 2
    # solver
    Minimize(F, x) = 1.73205
    F(1.732) = -2.13844
end solve block
# 2. Засобами MATHCAD побудувати графік функції (див. завд. 1) і її похідної. З використанням 1-ої похідної знайти всі локальні екстремуми функції. З використанням 2-ої похідної визначити характер знайдених екстремумів.
F(t) := t^4 + 8*t^3 - 6*t^2 - 72*t + 90
F1(t) := d/dt(F(t))
# [plot: F(x), F1(x) vs x]
solve block
    # guess values
    t := 1
    d/dt(F(t)) = -56
    Find(t)  # error: Неизвестная ошибка: could_not_initialize_outofproc_symbolic_engine.
    sign(d^2/dt^2(F(t))) = 1
    F(1.732) = -2.13844
    F(t) = 21
end solve block
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solve block
    # guess values
    G(x, y) := 3*x^2 - 3*x*y + 4*y^2 - 2*x + y
    x := 3
    y := 3
    # constraints
    0 ≤ x ≤ 4
    0 ≤ y ≤ 4
    # solver
    Minimize(G, x, y) = [0.333333; 1.39617e-13]
    G(0.333, 1.396*10^-13) = -0.333333
    # [3D plot: G]
end solve block
# 4. За допомогою функції Minerr() MATHCAD знайти екстремум функції від двох змінних (див. завд. 3).
#
# Примітка: На випадок неможливості знаходження розв’язку функцією Find() використовують функцію Minerr(x1,x2,x3,…), яка повертає наближений розв’язок системи рівнянь відносно невідомих x1,x2,x3,…, використовуючи критерій мінімізації відповідного функціонала відхилення. Для цього у блоці розв’язування рівнянь замість функції Find() слід вжити функцію Minerr() з тим же набором параметрів.
solve block
    # guess values
    G(x, y) := 3*x^2 - 3*x*y + 4*y^2 - 2*x + y
    x := 3
    y := 3
    # constraints
    d/dx(G(x, y)) == 0
    d/dy(G(x, y)) == 0
    # solver
    [x; y] := Minerr(x, y) = [0.333333; 1.49591e-7]
    G(x, y) = -0.333333
end solve block
# 5. Засобами MATHCAD розв’язати наступну задачу лінійного програмування. Перевірити, чи знайдені розв’язки задовольняють задані обмеження. Зобразити графічно область допустимих розв’язків.
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solve block
    # guess values
    f(x, y) := -2*x + y
    x := 1
    y := 1
    # constraints
    4*x - 3*y ≤ 12
    -x + 2*y ≤ 8
    2*x + 3*y ≥ 6
    x ≥ 0
    y ≥ 0
    # solver
    [x; y] := Maximize(f, x, y) = [0; 4]
    f(x, y) = 4
    Перевірка
    4*x - 3*y = -12
    -x + 2*y = 8
    2*x + 3*y = 12
    y1(t) := (-12 - 4*t)/(-3)
    y2(t) := (8 + t)/2
    y3(t) := (12 - 2*t)/3
    # [plot: y1(t), y2(t), y3(t) vs t]
end solve block
solve block
    # guess values
    f(x, y) := -2*x + y
    x := 1
    y := 1
    # constraints
    4*x - 3*y ≤ 12
    -x + 2*y ≤ 8
    2*x + 3*y ≥ 6
    x ≥ 0
    y ≥ 0
    # solver
    [x; y] := Minimize(f, x, y) = [9.6; 8.8]
    f(x, y) = -10.4
    Перевірка
    4*x - 3*y = 12
    -x + 2*y = 8
    2*x + 3*y = 45.6
    y1(t) := (12 - 4*t)/(-3)
    y2(t) := (8 - t)/2
    y3(t) := (45.6 - 2*t)/3
    # [plot: y1(t), y2(t), y3(t) vs t]
end solve block
# 6. Засобами MATHCAD розв’язати наступну задачу нелінійного програмування. Перевірити, чи знайдені розв’язки задовольняють задані обмеження.
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solve block
    # guess values
    f(x, y) := (x + 1)^2 + (y - 3)^2
    x := 1
    y := 1
    # constraints
    4*x - 2*y ≤ 12
    -x + 3*y ≤ 6
    2*x + 3*y ≥ 16
    x ≥ 0
    y ≥ 0
    # solver
    [x; y] := Maximize(f, x, y) = [4.8; 3.6]
    f(x, y) = 34
    Перевірка
    4*x - 2*y = 12
    -x + 3*y = 6
    2*x + 3*y = 20.4
end solve block
solve block
    # guess values
    f(x, y) := (x + 1)^2 + (y - 3)^2
    x := 1
    y := 1
    # constraints
    4*x - 2*y ≤ 12
    -x + 3*y ≤ 6
    2*x + 3*y ≥ 16
    x ≥ 0
    y ≥ 0
    # solver
    [x; y] := Minimize(f, x, y) = [3.33333; 3.11111]
    f(x, y) = 18.7901
    Перевірка
    4*x - 2*y = 7.11111
    -x + 3*y = 6
    2*x + 3*y = 16
end solve block
