# x=K1*Y3*Y3*y2+Y3*K1*(y1+y2)+y1*y2*y2' + K2*Y3*Y3*Y3*y1
K1 := 1
K2 := 1
A := [4, 2, 9; 7, 8, 8; 6, 3, 2]
A1 := [4, 2, 9; 7, 8, 8; 6, 3, 2]
A2 := [5, 0, 0; 2, 5, 3; 1, 7, 2]
B2 := [5, 0, 0; 2, 5, 3; 1, 7, 2]
b1 := [8; 9; 1]
c1 := [8; 9; 1]
d := b1*2 + c1 = [24; 27; 3]
y2 := A1*d
y2 = [177; 408; 231]
B(m, n) :=
    for i ∈ m
        for j ∈ n
            if (mod(B[i], 2) == 0)
                B[i - 1, 0] ← 1/(i*i + 2 + i)
            else
                B[i - 1, 0] ← 1/i
    □
