4.
f(x) := x/(2 + x)
a := 0
b := 2.5
i := 0 .. 5
h := (a + b)/5 = 0.5
n := (b - a)/h = 5
x := 0, 0.5 .. 2.5 = [0; 0.5; 1; 1.5; 2; 2.5]
f(x) = [0; 0.2; 0.333333; 0.428571; 0.5; 0.555556]
L(x) := sum(f(x[k])*product(if(k == j, 1, (x - x[j])/(x[k] - x[j])), j = 0 .. 3), k = 0 .. 3)
# [plot: L(x) vs x]
Vx[i] := a + h*i
Vy[i] := f(Vx[i])
Vx = [0; 0.5; 1; 1.5; 2; 2.5]
Vy = [0; 0.2; 0.333333; 0.428571; 0.5; 0.555556]
L3 =  # error: Эта переменная не определена. Проверьте правильность установки обозначения.
f_1(L3) := linterp(Vx, Vy, 0.6) = 0.226667
f_2(L3) := predict(f(x), 5, 1) = [0.540282]
